*Heading
** Job name: Coupon_8Ply Model name: CLIP_Coupon
** Generated by: Abaqus/CAE 2021
*Preprint, echo=NO, model=NO, history=NO, contact=NO
**
** PARTS
**
*Part, name=Coupon_8Ply_1in_05in
*Node
      1,           1.,          0.5, 0.0560000017
      2,           1.,           0., 0.0560000017
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*Element, type=C3D20
 1,  62, 217, 238,  49,   1,  37,  42,   4, 409, 408, 407, 406, 410, 411, 412,
    413, 415, 414, 416, 417
 2, 217, 218, 239, 238,  37,  38,  41,  42, 420, 419, 418, 408, 421, 422, 423,
    411, 414, 424, 425, 416
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*Nset, nset=Plies0
    1,    2,    3,    4,    5,    6
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*Elset, elset=Plies0
  33,  34,  35,  36,  37,  38
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*Nset, nset=Plies90
    1,    2,    3,    4,    5,    6
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*Elset, elset=Plies90
   1,   2,   3,   4,   5,   6
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*Orientation, name=Ori-2
1., 0., 0., 0., 1., 0.
3, 90.
** Section: OxOxPly
*Solid Section, elset=Plies90, orientation=Ori-2, material=openDMumat
,
*Orientation, name=Ori-1
1., 0., 0., 0., 1., 0.
3, 0.
** Section: OxOxPly
*Solid Section, elset=Plies0, orientation=Ori-1, material=openDMumat
,
*End Part
**
**
** ASSEMBLY
**
*Assembly, name=Assembly
**
*Instance, name=Coupon_8Ply_1in_05in-1, part=Coupon_8Ply_1in_05in
*End Instance
**
*Nset, nset=PinSurf, instance=Coupon_8Ply_1in_05in-1
    5,    6,    7,    8,   11,   12
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*Elset, elset=PinSurf, instance=Coupon_8Ply_1in_05in-1
  29,  30,  31,  32,  61,  62
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*Nset, nset=PullSurf, instance=Coupon_8Ply_1in_05in-1
    1,    2,    3,    4,    9,   10
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*Elset, elset=PullSurf, instance=Coupon_8Ply_1in_05in-1
   1,   2,   3,   4,  33,  34
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*Nset, nset=XZSymmFace, instance=Coupon_8Ply_1in_05in-1
    2,    3,    5,    6,   10,   12
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*Elset, elset=XZSymmFace, instance=Coupon_8Ply_1in_05in-1
   4,   8,  12,  16,  20,  24
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*Nset, nset=_PickedSet7, internal, instance=Coupon_8Ply_1in_05in-1
 34,
*End Assembly
*Amplitude, name=LoadCycle
             0.,              0.,             0.2,             0.5,             0.4,              0.,             0.6,            -0.5
            0.8,              0.,              1.,              1.
**
** MATERIALS
**
** Props:
** E11,E22,E33,nu12,nu23,nu13,G12,G23,
** G13, hs1_11, hs1_12, hs1_13, hs2_22, hs2_12, hs2_23, hs4_11,
** hs4_12, hs4_13, hs4_16, hs5_11, hs5_12, hs5_13, hs5_16, b1,
** b2, b3, y01, y02, y04, y05, yc1, yc2,
** yc4, yc5, pe1, pe2, pe4, pe5, dc1, dc2,
** dc4, dc5
*Material, name=openDMumat
*USER MATERIAL, CONSTANT=42
 12.416e6, 12.416e6, 7.513e6, 0.1106, 0.1707, 0.1707, 3.332e6, 0.670e6,
 0.670e6, 1.71, 2.5, 2.5, 1.71, 2.5, 2.5, 2.67,
 3.01, 2.5, 2.5, 2.60, 2.52, 2.5, 2.5, 0.2,
 0.2, 0.2, 0.05, 0.05, 0.05, 0.05, 500, 500,
 500, 500, 1.50, 1.50, 1.38, 1.38, 1.39, 1.39,
 5.16, 5.16,
*DEPVAR
 29
1, CEff11, "CEff11"
2, CEff11, "CEff12"
3, CEff11, "CEff13"
4, CEff11, "CEff14"
5, CEff11, "CEff15"
6, CEff11, "CEff16"
7, CEff22, "CEff22"
8, CEff22, "CEff23"
9, CEff22, "CEff24"
10, CEff22, "CEff25"
11, CEff22, "CEff26"
12, CEff33, "CEff33"
13, CEff33, "CEff34"
14, CEff33, "CEff35"
15, CEff33, "CEff36"
16, CEff44, "CEff44"
17, CEff44, "CEff45"
18, CEff44, "CEff46"
19, CEff55, "CEff55"
20, CEff55, "CEff56"
21, CEff66, "CEff66"
22, Y1Max, "Y1Max"
23, Y2Max, "Y2Max"
24, Y4Max, "Y4Max"
25, Y5Max, "Y5Max"
26, d1, "d1"
27, d2, "d2"
28, d4, "d4"
29, d5, "d5"
** ----------------------------------------------------------------
**
** STEP: Pull
**
*Step, name=Pull, nlgeom=NO
*Static
0.0125, 1.0, 1e-05, 0.0125
**
** BOUNDARY CONDITIONS
**
** Name: Pull Type: Displacement/Rotation
*Boundary, amplitude=LoadCycle
PullSurf, 1, 1, 0.003
** Name: XZSymm Type: Symmetry/Antisymmetry/Encastre
*Boundary
XZSymmFace, YSYMM
** Name: YZSymm Type: Symmetry/Antisymmetry/Encastre
*Boundary
PinSurf, XSYMM
** Name: zRBM Type: Displacement/Rotation
*Boundary
_PickedSet7, 3, 3
**
** OUTPUT REQUESTS
**
*Restart, write, frequency=0
**
** FIELD OUTPUT: F-Output-1
**
*Output, field, variable=PRESELECT
*ELEMENT OUTPUT
 SDV1, SDV2, SDV3, SDV4, SDV5, SDV6, SDV7, SDV8, SDV9,
 SDV10, SDV11, SDV12, SDV13, SDV14, SDV15, SDV16, SDV17,
 SDV18, SDV19, SDV20, SDV21, SDV22, SDV23, SDV24, SDV25,
 SDV26, SDV27, SDV28, SDV29
**
** HISTORY OUTPUT: H-Output-1
**
*Output, history, variable=PRESELECT
*End Step
